A := [1, 3, 2; 4, 5, 6; 5, 7, 9]
B := [3; 5; 4]
□^-1
x := A^-1*B
x = [2.66667; 1.66667; -2.33333]
L := eigenvals(A)
L = [15.2885; -0.924967; 0.636429]
c[:, 0] := eigenvec(A, L[0])
d[:, 0] := eigenvec(A, L[1])
f[:, 0] := eigenvec(A, L[2])
c = [0.228507; 0.555207; 0.799706]
d = [0.863062; -0.498157; -0.0834469]
f = [-0.613729; -0.385105; 0.689225]
transpose(A) = [1, 4, 5; 3, 5, 7; 2, 6, 9]
A^-1 = [-0.333333, 1.44444, -0.888889; 0.666667, 0.111111, -0.222222; -0.333333, -0.888889, 0.777778]
A^3 = [341, 495, 580; 830, 1201, 1410; 1195, 1730, 2031]
